x := transpose([
    298, 299, 300, 301, 302, 303, 304, 305, 306, 307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])
y := transpose([
    36.97233275, 37.00254244, 37.0327993, 37.0631026, 37.0934516, 37.12384555, 37.15428373, 37.1847654, 37.21528983, 37.24585629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])
k := 3
s := regress(x, y, k)
t := 1, 1.5 .. 1100
L(t) := interp(s, x, y, t)
b := submatrix(s, 3, length(s) - 1, 0, 0)
[1, w, w^2, w^3]
b = [24.3366; 0.0477924; -2.00141e-5; -2.34381e-11]
L(300) = 36.8725
f(m) := L(m)
F(w) := [1, w, w^2, w^3]*b
F(300) = 36.8725
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integral(F(w), w = 293 .. 333)/(333 - 293) = 37.3315
